CPU_freq := 16 MHz
TWBR := 3
TWPS := 1
SCL == CPU_freq/(16 + 2*TWBR*4^TWPS) → SCL == 2*MHz/5
2*MHz/5 = 400 kHz
clear(TWBR)
SCL := 100 kHz
SCL == CPU_freq/(16 + 2*TWBR*4^TWPS) solve, TWBR; simplify → MHz/(50*kHz) - 2
MHz/(50*kHz) - 2 = 18
clear(SCL, TWBR, TWPS)
TWPS := 3
TWBR := 20
MHz/161 = 6.21118 kHz
SCL == CPU_freq/(16 + 2*TWBR*4^TWPS) → SCL == MHz/161
